// test_double_assert

module assert;
module climate;

object climate {
        name pClimate;
	temperature 50;
};

	object double_assert {
		parent pClimate;
		target "temperature";
		value 50;
		within 1;
	};
