// test_enum_assert_err

module assert;
module climate;

object climate {
    name my_climate; // Give the climate object a name to be referenced
    interpolate NONE;
};

object enum_assert {
    name enum_assert_1;
    parent my_climate; // Use the parent property to link to the climate object
    target "interpolate";
    value 1;
};
