module tape;
module residential;

clock {
	starttime '2000-01-01 00:00:00';
	stoptime '2000-01-02 00:00:00';
}

object house {
	name myhouse;
	load {
		total 7;
		demand 12;
		energy 24;
	};
	object recorder {
		parent myhouse;
		property energy;
		interval 0;
		file test_struct.csv;
	};
}
