// $Id: test_clotheswasher_implicit.glm 4738 2014-07-03 00:55:39Z dchassin $
// Test implicit clotheswasher
//

#set suppress_repeat_messages=0
#set randomseed=10

#define stylesheet="C:\Project Files\Gridlabd\gridlab-d\trunk\VS2005\gridlabd-2_0.xsl"

clock {
	timezone PST+8PDT;
	starttime '2001-01-01 00:00:00 PST';
	stoptime '2002-01-01 00:00:00 PST';
}

module residential {
	implicit_enduses CLOTHESWASHER;
}

module assert;
module tape;

object house{
  name "autogen_house_0";

	object recorder{
	  parent "autogen_house_0";
	  name "autogen_house_0_recorder_0";
		property panel.power,panel.energy;
		file "test_clotheswasher_energy.csv";
		interval 3600;
		limit 100;
	};
}
