// $Id: test_waterheater_implicit.glm 4738 2014-07-03 00:55:39Z dchassin $
// Test waterheater implicit
//

#set suppress_repeat_messages=0

clock {
	timezone PST+8PDT;
	starttime '2001-01-01 00:00:00 PST';
	stoptime '2002-01-01 00:00:00 PST';
}

module residential {
	implicit_enduses WATERHEATER;
}
module assert;
module tape;

object house {
  name "autogen_house_0";
	object recorder{
	  parent "autogen_house_0";
	  name "autogen_house_0_recorder_0";
		property panel.power,panel.energy,system_mode,air_temperature,outdoor_temperature;
		interval -1;
		limit 400;
		file house.csv;
	};
}
